# NUFEB simulation

atom_style	bio
atom_modify	map array sort 100 5.0e-7
boundary	pp pp ff
newton		off
processors  * * 1

units si

comm_modify	vel yes
read_data_bio atom.in

variable x equal 50
variable y equal 20
variable z equal 20

lattice sc 1e-6 origin 0.5 0.5 0.5

region reg block 0 $x 0 $y 0 $z
region reg2 block 0 $x 0 $y 0 1

variable  xx internal 0.0
variable  yy internal 0.0
variable  zz internal 0.0
variable  v equal "(0.12*v_z*zlat * cos(v_xx/xlat * 2.0*PI*PI/v_x) * cos(v_yy/ylat * 0.75 *PI*PI/v_y) + 0.9*v_z*zlat - v_zz  ) > 0.0"

group STEM type 1

create_atoms 7 region reg var v set x xx set y yy set z zz
set type 7 density 150
set type 7 diameter 1.0e-6
set type 7 mass 7.853981e-17

create_pso_atoms 1 stem 1e-8 150 1.0e-6 350 64564
set type 1 density 150
set type 1 diameter 1.0e-6
set type 1 mass 7.853981e-17

#create_atoms 5 random 100 64565 reg2
create_atoms 4 random 100 64564 reg2

group TA type 2
group DIFF type 3
group TCELL type 4
group DC type 5
group APOP type 6
group BM type 7

group BASE union BM TCELL DC
group PROLIF union STEM TA

fix fz1 BASE freeze
fix nomove BASE move linear 0.0 0.0 0.0 units box

neighbor	5e-7 bin
neigh_modify delay 0 exclude group BASE BASE

set type 2 density 150
set type 2 diameter 1.0e-6
set type 2 mass 7.853981e-17

set type 3 density 150
set type 3 diameter 1.0e-6
set type 3 mass 7.853981e-17

set type 4 density 150
set type 4 diameter 1.0e-6
set type 4 mass 7.853981e-17

set type 5 density 150
set type 5 diameter 1.0e-6
set type 5 mass 7.853981e-17

set type 6 density 150
set type 6 diameter 1.0e-6
set type 6 mass 7.853981e-17

##############Define DEM Variables&Commands##############


pair_style  gran/hooke/history 2500 NULL 2500 NULL 0.0 1
pair_coeff  * *

pair_style  gran/hooke/history 2000 NULL 2250 NULL 0.0 1
pair_coeff 1 7

pair_style  gran/hooke/history 2300 NULL 2250 NULL 0.0 1
pair_coeff 2 7

pair_style  gran/hooke/history 2750 NULL 2750 NULL 0.0 1
pair_coeff  3 7

#pair_style  gran/hooke/history 1750 NULL 1750 NULL 0.0 1
#pair_coeff 1 1

#pair_style  gran/hooke/history 1500 NULL 1500 NULL 0.0 1
#pair_coeff 1 2

#pair_style  gran/hooke/history 2500 NULL 2500 NULL 0.0 1
#pair_coeff 1 3

timestep 1e-3

velocity BASE set 0.0 0.0 0.0 units box

fix 1 all nve/limit 1e-8
fix fv1 all viscous 1e-5

#fix zw all wall/gran hooke/history 2500 NULL 500.0 NULL 1.5 0 zplane  0.0  0.6e-4
fix zwb STEM wall/gran hooke/history 2000 NULL 500.0 NULL 1.5 0 zplane  1.6e-5  0.6e-4
fix zwt TA wall/gran hooke/history 2300 NULL 500.0 NULL 1.5. 0 zplane 1.6e-5 0.6e-4
#fix zwd DIFF wall/gran hooke/history 2500 NULL 500.0 NULL 1.5 0 zplane  0.0  0.6e-4

variable kanc equal 50

# a1 = bm-sc  a2 = bm-ta a3 = sc-ta  a4 =sc-diff  a5 = ta-diff a6 = same cell type
fix fco all cohesivede 1.6e-12 1 1e-8 1e-6 1 1.6-12 1.6e-16 0 1.6e-16 1.6e-13

##############Define IBm Variables##############


#variables used in fix division
variable divDia equal 1.36e-6
variable divisionCounter equal 4
variable asym equal 0.8
variable maxDivCount equal 4
variable stemPercent equal 0.05

#variables used in fix kinetics
variable diffT equal 1e-4
variable layer equal -1
variable tol equal 1e-6

#common variables used in growth
#variable abase1 equal 0.0012
#variable abase2 equal 0.1
variable abaseT equal 7.384e-8
variable abaseSC equal 4.000e-10
variable abaseTA equal 4.000e-8
variable abaseD equal 4.167e-13
variable ca2 equal 0.00000578703

#variables used in growth/sc
variable STEMdens equal 30
#variable sc2ta equal 8.784e-3
variable sc2ta equal 1.784e-8
variable sc2gf equal 0.00001157407
variable gf20 equal 0.0004224537

#variables used in growth/ta
variable TAdens equal 30
variable ta2d equal 2.091e-8
variable ta2gf equal 0.00001157407

#variable used in growth/diff
variable DIFFdens equal 30
variable ddesq equal 5.501e-8
variable diff2ca1 equal 0.005
variable diff2ca2 equal 0.01

#variables used in growth/tcell
variable TCELLdens equal 30
variable il172 equal 0.00000578703
variable tnfa2 equal 0.00000578703
variable il1720 equal 4.225e-7
variable tnfa20 equal 4.225e-7

#variables used in growth/dc
variable DCdens equal 30
variable dckp equal 3.472e7
variable dcact equal 0.02083333333
variable il232 equal 0.00001157407

##############Define IBm Commands##############

fix k1 all kinetics 1 10 4 6 v_diffT v_layer demflag 0 niter 5000
#fix kgdc DC psoriasis/growth/dc v_DCdens v_abase1 v_dckp v_dcact v_il232
fix kgtc TCELL psoriasis/growth/tcell v_TCELLdens v_abaseT v_il172 v_tnfa2 v_il1720 v_tnfa20 v_il232
fix g1 all kinetics/diffusion v_tol pp pp nd dcflag 2
#fix g1 all kinetics/diffusion v_tol pp pp nd closedflag 1
fix kgsc STEM psoriasis/growth/sc v_STEMdens v_abaseSC v_sc2ta v_sc2gf v_gf20 v_ca2
fix d1 STEM psoriasis/divide_stem 1 v_divDia v_asym v_STEMdens v_stemPercent 64564 demflag 0
fix kgta TA psoriasis/growth/ta v_TAdens v_abaseTA v_ta2d v_ta2gf v_gf20 v_ca2
fix d2 TA psoriasis/divide_ta 1 v_divDia v_asym v_TAdens v_maxDivCount 64564 demflag 0
fix kgd DIFF psoriasis/growth/diff v_DIFFdens v_abaseD v_ddesq v_diff2ca1 v_diff2ca2

##############Define IBm Computes##############

compute myNtypes all ntypes
compute myMass all biomass
compute myNur all avg_con

##############Simulation Output##############

# Use atom_# instead of atom%_#
dump		du1 all custom/vtk 3601 atom_*.vtu id type diameter x y z
dump		du2 all grid 3601 grid_%_*.vti con
dump d0 all bio 1000 ntypes avg_con
thermo_style    custom step cpu atoms c_myNtypes[*]
thermo		1001
thermo_modify	lost ignore

##############Define Bio-loop and DEM-subloop##############

run 2000 pre no post no every 1 &
"fix_modify k1 demflag 1" &
"fix_modify d1 demflag 1" &
"fix_modify d2 demflag 1" &
"timestep 1e-3" &
"run 1000 pre no post no" &
"timestep 3600"  &
"fix_modify k1 demflag 0" &
"fix_modify d1 demflag 0" &
"fix_modify d2 demflag 0"
